# OpenSim document version 40500
InverseKinematicsTool:
  time_range: 0 8.34
  marker_file: ../Data/P01/c3d/trial_1_R_unaffected.trc
  IKTaskSet:
    IKMarkerTask shoulder_R: apply=true weight=1
    IKMarkerTask shoulder_L: apply=true weight=1
    IKMarkerTask arm_R: apply=true weight=1
    IKMarkerTask elbow_R: apply=true weight=1
    IKMarkerTask wrist_inner_R: apply=true weight=1
    IKMarkerTask wrist_outer_R: apply=true weight=1
    IKMarkerTask arm_L: apply=true weight=1
    IKMarkerTask elbow_L: apply=true weight=1
    IKMarkerTask wrist_inner_L: apply=true weight=1
    IKMarkerTask wrist_outer_L: apply=true weight=1
    IKMarkerTask hip_R: apply=true weight=1
    IKMarkerTask hip_L: apply=true weight=1
    IKMarkerTask middlefinger_R: apply=false weight=1
    IKMarkerTask indexfinger_R: apply=false weight=1
    IKMarkerTask thumb_R: apply=false weight=1
    IKMarkerTask thumb_L: apply=false weight=1
    IKMarkerTask indexfinger_L: apply=false weight=1
    IKMarkerTask middlefinger_L: apply=false weight=1
    IKMarkerTask hand_R: apply=true weight=1
    IKMarkerTask hand_L: apply=true weight=1
    IKMarkerTask chest: apply=true weight=1
    IKMarkerTask head: apply=true weight=1
