# OpenSim document version 40500
ScaleTool iDrink_Coco17_UpperBody_scaled:
  mass: 70 [kg]
  height: -1
  age: -1
  ModelScaler:
    apply: true
    scaling_order: measurements manualScale
    time_range: 0.01666667 0.01666667
    preserve_mass_distribution: true
    output_model_file: C:/iDrink/Default-Files/../Session Data/S20240501-115510/S20240501-115510_P07/S20240501-115510_P07_T07/Scaled_Coco17_UpperBody.osim
    MeasurementSet:
      Measurement torso: apply=true
        MarkerPair: markers=(LShoulder LHip)
        MarkerPair: markers=(RShoulder RHip)
        MarkerPair: markers=(LShoulder RShoulder)
        BodyScale lumbar5: axes=(X Y Z)
        BodyScale lumbar4: axes=(X Y Z)
        BodyScale lumbar3: axes=(X Y Z)
        BodyScale lumbar2: axes=(X Y Z)
        BodyScale lumbar1: axes=(X Y Z)
        BodyScale torso: axes=(X Y Z)
        BodyScale Abdomen: axes=(X Y Z)
      Measurement forearm: apply=false
        MarkerPair: markers=(LElbow LWrist)
        MarkerPair: markers=(RElbow RWrist)
      Measurement head: apply=true
        MarkerPair: markers=(LEye REye)
        MarkerPair: markers=(LEar REar)
        MarkerPair: markers=(Nose LEar)
        MarkerPair: markers=(Nose REar)
        BodyScale head: axes=(X Y Z)
      Measurement pelvis: apply=true
        MarkerPair: markers=(RHip LHip)
        BodyScale pelvis: axes=(X Y Z)
        BodyScale sacrum: axes=(X Y Z)
      Measurement ArmL: apply=true
        MarkerPair: markers=(LShoulder LElbow)
        BodyScale humerus_l: axes=(X Y Z)
      Measurement ArmR: apply=true
        MarkerPair: markers=(RShoulder RElbow)
        BodyScale humerus_r: axes=(X Y Z)
      Measurement ForearmL: apply=true
        MarkerPair: markers=(LElbow LWrist)
        BodyScale ulna_l: axes=(X Y Z)
        BodyScale radius_l: axes=(X Y Z)
        BodyScale hand_l: axes=(X Y Z)
      Measurement ForearmR: apply=true
        MarkerPair: markers=(RElbow RWrist)
        BodyScale ulna_r: axes=(X Y Z)
        BodyScale radius_r: axes=(X Y Z)
        BodyScale hand_r: axes=(X Y Z)
    ScaleSet:
      Scale: scales=(0.95 0.95 0.95) segment=pelvis apply=false
      Scale: scales=(0.85 0.85 0.85) segment=patella_r apply=false
      Scale: scales=(0.85 0.85 0.85) segment=talus_r apply=false
      Scale: scales=(0.85 0.85 0.85) segment=toes_r apply=false
      Scale: scales=(0.85 0.85 0.85) segment=patella_l apply=false
      Scale: scales=(0.85 0.85 0.85) segment=talus_l apply=false
      Scale: scales=(0.85 0.85 0.85) segment=toes_l apply=false
      Scale: scales=(0.8 0.8 0.8) segment=torso apply=false
      Scale: scales=(0.8 0.8 0.8) segment=head apply=false
  MarkerPlacer:
    apply: false
    marker_file: C:/iDrink/Default-Files/../Session Data/S20240501-115510/S20240501-115510_P07/S20240501-115510_P07_T07/pose-3d/S20240501-115510_P07_T07_0-475_filt_butterworth.trc
    time_range: 0.01666667 0.01666667
    output_model_file: C:/iDrink/Default-Files/../Session Data/S20240501-115510/S20240501-115510_P07/S20240501-115510_P07_T07/Scaled_Coco17_UpperBody.osim
    max_marker_movement: -1
    IKTaskSet:
      IKMarkerTask Nose: apply=true weight=1
      IKMarkerTask LShoulder: apply=true weight=0.5
      IKMarkerTask RShoulder: apply=true weight=1
      IKMarkerTask LElbow: apply=true weight=1
      IKMarkerTask RElbow: apply=true weight=1
      IKMarkerTask LWrist: apply=true weight=1
      IKMarkerTask RWrist: apply=true weight=1
      IKMarkerTask LHip: apply=true weight=0.5
      IKMarkerTask RHip: apply=true weight=0.5
      IKMarkerTask LEar: apply=true weight=0.3
      IKMarkerTask REar: apply=true weight=0.3
      IKMarkerTask REye: apply=true weight=0.3
      IKMarkerTask LEye: apply=true weight=0.3
      IKCoordinateTask [values shared by the 62 below unless stated]: apply=true weight=0.2 value_type=default_value
          value=0
      IKCoordinateTask pelvis_tilt
      IKCoordinateTask pelvis_list
      IKCoordinateTask pelvis_rotation
      IKCoordinateTask pelvis_tx
      IKCoordinateTask pelvis_ty
      IKCoordinateTask pelvis_tz
      IKCoordinateTask hip_flexion_r
      IKCoordinateTask hip_adduction_r
      IKCoordinateTask hip_rotation_r
      IKCoordinateTask knee_angle_r
      IKCoordinateTask knee_angle_r_beta
      IKCoordinateTask ankle_angle_r
      IKCoordinateTask subtalar_angle_r
      IKCoordinateTask mtp_angle_r
      IKCoordinateTask hip_flexion_l
      IKCoordinateTask hip_adduction_l
      IKCoordinateTask hip_rotation_l
      IKCoordinateTask knee_angle_l
      IKCoordinateTask knee_angle_l_beta
      IKCoordinateTask ankle_angle_l
      IKCoordinateTask subtalar_angle_l
      IKCoordinateTask mtp_angle_l
      IKCoordinateTask L5_S1_Flex_Ext
      IKCoordinateTask L5_S1_Lat_Bending
      IKCoordinateTask L5_S1_axial_rotation
      IKCoordinateTask L4_L5_Flex_Ext
      IKCoordinateTask L4_L5_Lat_Bending
      IKCoordinateTask L4_L5_axial_rotation
      IKCoordinateTask L3_L4_Flex_Ext
      IKCoordinateTask L3_L4_Lat_Bending
      IKCoordinateTask L3_L4_axial_rotation
      IKCoordinateTask L2_L3_Flex_Ext
      IKCoordinateTask L2_L3_Lat_Bending
      IKCoordinateTask L2_L3_axial_rotation
      IKCoordinateTask L1_L2_Flex_Ext
      IKCoordinateTask L1_L2_Lat_Bending
      IKCoordinateTask L1_L2_axial_rotation
      IKCoordinateTask L1_T12_Flex_Ext
      IKCoordinateTask L1_T12_Lat_Bending
      IKCoordinateTask L1_T12_axial_rotation
      IKCoordinateTask Abs_r3
      IKCoordinateTask Abs_r2
      IKCoordinateTask Abs_r1
      IKCoordinateTask Abs_t1
      IKCoordinateTask Abs_t2
      IKCoordinateTask neck_flexion
      IKCoordinateTask neck_bending
      IKCoordinateTask neck_rotation
      IKCoordinateTask arm_flex_r
      IKCoordinateTask arm_add_r
      IKCoordinateTask arm_rot_r
      IKCoordinateTask elbow_flex_r
      IKCoordinateTask pro_sup_r
      IKCoordinateTask wrist_flex_r
      IKCoordinateTask wrist_dev_r
      IKCoordinateTask arm_flex_l
      IKCoordinateTask arm_add_l
      IKCoordinateTask arm_rot_l
      IKCoordinateTask elbow_flex_l
      IKCoordinateTask pro_sup_l
      IKCoordinateTask wrist_flex_l
      IKCoordinateTask wrist_dev_l
