# OpenSim document version 40500
InverseKinematicsTool:
  results_directory: ./
  model_file: C:\iDrink\Session Data\S20240501-115510\S20240501-115510_P07\S20240501-115510_P07_T07\Scaled_Coco17_UpperBody.osim
  constraint_weight: Inf
  accuracy: 1e-5
  time_range: 0 7.9
  output_motion_file: ../Session Data/S20240501-115510/S20240501-115510_P07/S20240501-115510_P07_T07/pose-3d/S20240501-115510_P07_T07_0-475_filt_butterworth.mot
  report_errors: true
  marker_file: ../Session Data/S20240501-115510/S20240501-115510_P07/S20240501-115510_P07_T07/pose-3d/S20240501-115510_P07_T07_0-475_filt_butterworth.trc
  report_marker_locations: false
  IKTaskSet:
    IKMarkerTask Nose: apply=true weight=1
    IKMarkerTask LShoulder: apply=true weight=1
    IKMarkerTask RShoulder: apply=true weight=1
    IKMarkerTask LElbow: apply=true weight=1
    IKMarkerTask RElbow: apply=true weight=1
    IKMarkerTask LWrist: apply=true weight=1
    IKMarkerTask RWrist: apply=true weight=1
    IKMarkerTask LHip: apply=true weight=1
    IKMarkerTask RHip: apply=true weight=1
    IKMarkerTask LEar: apply=true weight=1
    IKMarkerTask REar: apply=true weight=1
    IKMarkerTask REye: apply=true weight=1
    IKMarkerTask LEye: apply=true weight=1
    IKCoordinateTask [values shared by the 25 below unless stated]: apply=false value_type=default_value value=0
        weight=0.5
    IKCoordinateTask pelvis_tilt: weight=1
    IKCoordinateTask pelvis_list: weight=1
    IKCoordinateTask pelvis_rotation: weight=1
    IKCoordinateTask pelvis_tx: weight=1
    IKCoordinateTask pelvis_ty: weight=1
    IKCoordinateTask pelvis_tz: weight=1
    IKCoordinateTask hip_flexion_r
    IKCoordinateTask hip_adduction_r
    IKCoordinateTask hip_rotation_r
    IKCoordinateTask knee_angle_r
    IKCoordinateTask knee_angle_r_beta
    IKCoordinateTask ankle_angle_r
    IKCoordinateTask subtalar_angle_r
    IKCoordinateTask mtp_angle_r
    IKCoordinateTask hip_flexion_l
    IKCoordinateTask hip_adduction_l
    IKCoordinateTask hip_rotation_l
    IKCoordinateTask knee_angle_l
    IKCoordinateTask knee_angle_l_beta
    IKCoordinateTask ankle_angle_l
    IKCoordinateTask subtalar_angle_l
    IKCoordinateTask mtp_angle_l
    IKCoordinateTask L5_S1_Flex_Ext
    IKCoordinateTask L5_S1_Lat_Bending
    IKCoordinateTask L5_S1_axial_rotation
