# OpenSim document version 40500
InverseKinematicsTool:
  results_directory: ./
  model_file: C:\iDrink\Session Data\S20240501-115510\S20240501-115510_P07\S20240501-115510_P07_T07\Scaled_Coco17_UpperBody.osim
  constraint_weight: Inf
  accuracy: 1e-5
  time_range: 0 11.85
  report_errors: true
  marker_file: cam1_trial_44_R_affected_0-712_filt_iDrinkbutter.trc
  report_marker_locations: false
  IKTaskSet:
    IKMarkerTask head: apply=true weight=1
    IKMarkerTask lsho: apply=true weight=1
    IKMarkerTask rsho: apply=true weight=1
    IKMarkerTask lelb: apply=true weight=1
    IKMarkerTask relb: apply=true weight=1
    IKMarkerTask lwri: apply=true weight=1
    IKMarkerTask rwri: apply=true weight=1
    IKMarkerTask lhip: apply=true weight=1
    IKMarkerTask rhip: apply=true weight=1
    IKMarkerTask lcheek: apply=true weight=1
    IKMarkerTask rcheek: apply=true weight=1
    IKMarkerTask rfronthead: apply=true weight=1
    IKMarkerTask lfronthead: apply=true weight=1
    IKMarkerTask thor: apply=true weight=1
    IKMarkerTask rwripinkieside: apply=true weight=1
    IKMarkerTask rwrithumbside: apply=true weight=1
    IKMarkerTask lwripinkieside: apply=true weight=1
    IKMarkerTask lwrithumbside: apply=true weight=1
    IKMarkerTask backneck: apply=true weight=1
    IKMarkerTask pelv: apply=true weight=1
    IKMarkerTask mhip: apply=true weight=1
    IKMarkerTask rkne: apply=true weight=1
    IKMarkerTask lkne: apply=true weight=1
    IKMarkerTask rank: apply=true weight=1
    IKMarkerTask lank: apply=true weight=1
    IKMarkerTask rhan: apply=true weight=1
    IKMarkerTask rfin: apply=true weight=1
    IKMarkerTask rthumb: apply=true weight=1
    IKMarkerTask lhan: apply=true weight=1
    IKMarkerTask lfin: apply=true weight=1
    IKMarkerTask lthumb: apply=true weight=1
    IKMarkerTask rfoo: apply=true weight=1
    IKMarkerTask lfoo: apply=true weight=1
    IKMarkerTask clavicle: apply=true weight=1
    IKMarkerTask upperback: apply=false weight=1
    IKMarkerTask lback: apply=false weight=1
    IKMarkerTask rback: apply=false weight=1
    IKMarkerTask rscapula: apply=false weight=1
    IKMarkerTask lscapula: apply=false weight=1
    IKMarkerTask sternum: apply=false weight=1
    IKMarkerTask lbreast: apply=false weight=1
    IKMarkerTask rbreast: apply=false weight=1
    IKMarkerTask lbackhead: apply=true weight=1
    IKMarkerTask rbackhead: apply=true weight=1
