# OpenSim document version 40500
ScaleTool iDrink_OMC_Rajagopal2016-scaled:
  mass: 75.337 [kg]
  height: -1
  age: -1
  ModelScaler:
    apply: true
    scaling_order: measurements
    marker_file: C:/iDrink/Default-Files/../Data/P01/c3d/trial_1_R_unaffected.trc
    time_range: 0 0
    preserve_mass_distribution: false
    MeasurementSet:
      Measurement pelvis(hiptohip): apply=true
        MarkerPair: markers=(hip_L hip_R)
        BodyScale pelvis: axes=(X Y Z)
      Measurement Torso: apply=true
        MarkerPair: markers=(chest hip_R)
        MarkerPair: markers=(chest hip_L)
        MarkerPair: markers=(chest shoulder_R)
        MarkerPair: markers=(chest shoulder_L)
        BodyScale torso: axes=(X Y Z)
      Measurement Humerus_R: apply=true
        MarkerPair: markers=(shoulder_R elbow_R)
        BodyScale humerus_r: axes=(X Y Z)
      Measurement Humerus_L: apply=true
        MarkerPair: markers=(shoulder_L elbow_L)
        BodyScale humerus_l: axes=(X Y Z)
      Measurement Radius_R: apply=true
        MarkerPair: markers=(elbow_R wrist_inner_R)
        BodyScale radius_r: axes=(X Y Z)
      Measurement Ulna_R: apply=true
        MarkerPair: markers=(elbow_R wrist_outer_R)
        BodyScale ulna_r: axes=(X Y Z)
      Measurement Hand_R: apply=true
        MarkerPair: markers=(wrist_inner_R hand_R)
        MarkerPair: markers=(wrist_inner_L hand_R)
        MarkerPair: markers=(wrist_inner_R thumb_R)
        MarkerPair: markers=(hand_R indexfinger_R)
        MarkerPair: markers=(hand_R middlefinger_R)
        BodyScale hand_r: axes=(X Y Z)
      Measurement Radius_L: apply=true
        MarkerPair: markers=(elbow_L wrist_inner_L)
        BodyScale radius_l: axes=(X Y Z)
      Measurement Ulna_L: apply=true
        MarkerPair: markers=(elbow_L wrist_outer_L)
        BodyScale ulna_l: axes=(X Y Z)
      Measurement Hand_L: apply=true
        MarkerPair: markers=(wrist_inner_L hand_L)
        MarkerPair: markers=(wrist_outer_L hand_L)
        MarkerPair: markers=(wrist_inner_L thumb_L)
        MarkerPair: markers=(hand_L indexfinger_L)
        MarkerPair: markers=(hand_L middlefinger_L)
        BodyScale hand_l: axes=(X Y Z)
  MarkerPlacer:
    apply: true
    marker_file: C:/iDrink/Default-Files/../Data/P01/c3d/trial_1_R_unaffected.trc
    time_range: 0 0
    max_marker_movement: -1
    IKTaskSet:
      IKMarkerTask shoulder_R: apply=true weight=1
      IKMarkerTask shoulder_L: apply=true weight=1
      IKMarkerTask arm_R: apply=true weight=1
      IKMarkerTask elbow_R: apply=true weight=1
      IKMarkerTask wrist_inner_R: apply=true weight=1
      IKMarkerTask wrist_outer_R: apply=true weight=1
      IKMarkerTask arm_L: apply=true weight=1
      IKMarkerTask elbow_L: apply=true weight=1
      IKMarkerTask wrist_inner_L: apply=true weight=1
      IKMarkerTask wrist_outer_L: apply=true weight=1
      IKMarkerTask hip_R: apply=true weight=1
      IKMarkerTask hip_L: apply=true weight=1
      IKMarkerTask middlefinger_R: apply=true weight=1
      IKMarkerTask indexfinger_R: apply=true weight=1
      IKMarkerTask thumb_R: apply=true weight=1
      IKMarkerTask thumb_L: apply=true weight=1
      IKMarkerTask indexfinger_L: apply=true weight=1
      IKMarkerTask middlefinger_L: apply=true weight=1
      IKMarkerTask hand_R: apply=true weight=1
      IKMarkerTask hand_L: apply=true weight=1
      IKMarkerTask chest: apply=true weight=1
      IKMarkerTask head: apply=true weight=1
