# OpenSim document version 40500
ScaleTool Pose2Sim_AlphaPose-scaled:
  mass: 70 [kg]
  height: -1
  age: -1
  ModelScaler:
    apply: true
    scaling_order: measurements
    marker_file: cam1_trial_44_R_affected_0-712_filt_iDrinkbutter.trc
    time_range: 0 0.2
    preserve_mass_distribution: false
    MeasurementSet:
      Measurement head: apply=true
        MarkerPair: markers=(head lcheek)
        MarkerPair: markers=(head rcheek)
        BodyScale head: axes=(X Y Z)
      Measurement leftupper: apply=true
        MarkerPair: markers=(lsho lelb)
        BodyScale humerus_l: axes=(X Y Z)
      Measurement leftlower: apply=true
        MarkerPair: markers=(lelb lwri)
        BodyScale ulna_l: axes=(X Y Z)
        BodyScale radius_l: axes=(X Y Z)
        BodyScale hand_l: axes=(X Y Z)
      Measurement rightlower: apply=true
        MarkerPair: markers=(relb rwri)
        BodyScale ulna_r: axes=(X Y Z)
        BodyScale radius_r: axes=(X Y Z)
        BodyScale hand_r: axes=(X Y Z)
      Measurement rightupper: apply=true
        MarkerPair: markers=(rsho relb)
        BodyScale humerus_r: axes=(X Y Z)
      Measurement rupleg: apply=true
        MarkerPair: markers=(rkne rhip)
        BodyScale femur_r: axes=(X Y Z)
        BodyScale patella_r: axes=(X Y Z)
      Measurement rloleg: apply=true
        MarkerPair: markers=(rkne rank)
        BodyScale tibia_r: axes=(X Y Z)
        BodyScale talus_r: axes=(X Y Z)
        BodyScale calcn_r: axes=(X Y Z)
        BodyScale toes_r: axes=(X Y Z)
      Measurement lupleg: apply=true
        MarkerPair: markers=(lhip lkne)
        BodyScale femur_l: axes=(X Y Z)
        BodyScale patella_l: axes=(X Y Z)
      Measurement lolegd: apply=true
        MarkerPair: markers=(lkne lank)
        BodyScale tibia_l: axes=(X Y Z)
        BodyScale talus_l: axes=(X Y Z)
        BodyScale calcn_l: axes=(X Y Z)
        BodyScale toes_l: axes=(X Y Z)
      Measurement pelv: apply=true
        MarkerPair: markers=(rhip lhip)
        MarkerPair: markers=(pelv mhip)
        BodyScale pelvis: axes=(X Y Z)
        BodyScale sacrum: axes=(X Y Z)
      Measurement torso_low: apply=true
        MarkerPair: markers=(pelv mhip)
        BodyScale lumbar5: axes=(X Y Z)
        BodyScale lumbar4: axes=(X Y Z)
        BodyScale lumbar3: axes=(X Y Z)
        BodyScale lumbar2: axes=(X Y Z)
        BodyScale lumbar1: axes=(X Y Z)
      Measurement torso_upper: apply=true
        MarkerPair: markers=(lsho rsho)
        MarkerPair: markers=(rsho clavicle)
        BodyScale torso: axes=(X Y Z)
        BodyScale Abdomen: axes=(X Y Z)
  MarkerPlacer:
    apply: false
    marker_file: cam1_trial_44_R_affected_0-712_filt_iDrinkbutter.trc
    time_range: 0 0.2
    max_marker_movement: -1
    IKTaskSet:
      IKMarkerTask head: apply=true weight=1
      IKMarkerTask lsho: apply=true weight=1
      IKMarkerTask rsho: apply=true weight=1
      IKMarkerTask lelb: apply=true weight=1
      IKMarkerTask relb: apply=true weight=1
      IKMarkerTask lwri: apply=true weight=1
      IKMarkerTask rwri: apply=true weight=1
      IKMarkerTask lhip: apply=true weight=1
      IKMarkerTask rhip: apply=true weight=1
      IKMarkerTask lcheek: apply=true weight=1
      IKMarkerTask rcheek: apply=true weight=1
      IKMarkerTask rfronthead: apply=true weight=1
      IKMarkerTask lfronthead: apply=true weight=1
      IKMarkerTask thor: apply=true weight=1
      IKMarkerTask rwripinkieside: apply=true weight=1
      IKMarkerTask rwrithumbside: apply=true weight=1
      IKMarkerTask lwripinkieside: apply=true weight=1
      IKMarkerTask lwrithumbside: apply=true weight=1
      IKMarkerTask backneck: apply=true weight=1
      IKMarkerTask pelv: apply=true weight=1
      IKMarkerTask mhip: apply=true weight=1
      IKMarkerTask rkne: apply=true weight=1
      IKMarkerTask lkne: apply=true weight=1
      IKMarkerTask rank: apply=true weight=1
      IKMarkerTask lank: apply=true weight=1
